from scripts.system import System
from params import Parameters


def createScene(rootnode):
    from scripts.utils.header import addHeader, addSolvers

    params = Parameters()
    params.structure.height = 9.5
    params.structure.width = 18.45
    params.structure.length = 28.45
    params.structure.thickness = 0

    params.cable.nbSections *= 4
    params.cable.length *= 4

    settings, modelling, simulation = addHeader(rootnode)
    addSolvers(simulation, firstOrder=False, rayleighStiffness=0.2)
    rootnode.VisualStyle.displayFlags = "showInteractionForceFields showCollisionModels"

    system = System(modelling, simulation, cableModel='beam')
    for i, cable in enumerate(system.cables.children):
        cable.RigidBase.addObject('RestShapeSpringsForceField', points=[0], stiffness=1e12)
