from params import Parameters
import numpy as np
from math import floor
import Sofa.Core
import Sofa.constants.Key as Key
from scripts.pulley import Pulley
from scripts.cable import Cable
from splib3.numerics import vadd, vsub, Quat, Vec3


class CarocaController(Sofa.Core.Controller):

    def __init__(self, *args, **kwargs):
        Sofa.Core.Controller.__init__(self, *args, **kwargs)
        self.structure = args[0]

    def onKeypressedEvent(self, event):

        k = event.get("key")
        dt = self.structure.getRoot().dt.value

        if k == Key.plus:
            self.structure.speed.value = 0.07
        elif k == Key.minus:
            self.structure.speed.value = -0.07
        else:
            self.structure.speed.value = 0
        self.structure.displacement.value = self.structure.displacement.value + self.structure.speed.value * dt


class Caroca:
    """
    params:
    cableModel: (string) either cosserat or beam, default is beam
    """

    params = Parameters()

    def __init__(self, modelling, simulation, name='Caroca', position=[0, 0, 0, 0, 0, 0, 1], cableModel='beam',
                 inverse=False):
        self.modelling = modelling
        self.simulation = simulation
        self.name = name
        self.position = position
        self.cableModel = cableModel
        self.inverse = inverse

        self.__addStructure()
        self.__addPulleys()
        self.__addPlatform()
        self.__addDeformableCables()

        if self.cableModel == 'beam':
            self.addController()

        if self.inverse:
            self.__addEffector()

    def __addStructure(self):
        self.structure = self.modelling.addChild('Structure')

        dx = self.params.structure.length / 2. + self.params.structure.thickness
        dy = self.params.structure.height / 2. + self.params.structure.thickness
        dz = self.params.structure.width / 2. + self.params.structure.thickness
        position = [[dx, dy, dz],
                    [dx, dy, -dz],
                    [-dx, dy, dz],
                    [-dx, dy, -dz],

                    [dx, -dy, dz],
                    [dx, -dy, -dz],
                    [-dx, -dy, dz],
                    [-dx, -dy, -dz]]

        self.structure.addObject('MechanicalObject', template='Rigid3',
                                 position=[pos + [0, 0, 0, 1] for pos in position], showObject=False,
                                 showObjectScale=0.1,
                                 showIndices=False, showIndicesScale=0.1)
        self.structure.addObject('FixedConstraint', fixAll=True)

        visuals = self.structure.addChild('Visuals')
        t = self.params.structure.thickness
        max = [
            [-t, -t, -self.params.structure.width - t],
            [-self.params.structure.length - t, -t, t],
            [self.params.structure.length + t, -t, -t],
            [t, -t, self.params.structure.width + t],
            [-t, t, -self.params.structure.width - t],
            [-self.params.structure.length - t, t, t],
            [self.params.structure.length + t, t, -t],
            [t, t, self.params.structure.width + t]
        ]
        for i in range(8):
            visual = visuals.addChild('VisualTB' + str(i))
            visual.addObject('RegularGridTopology', min=[0, 0, 0], max=max[i])
            visual.addObject('OglModel', color=[0.1, 0.1, 0.1, 1])
            visual.addObject('RigidMapping', index=i)

        max = [
            [-t, - self.params.structure.height - t, -t],
            [-t, - self.params.structure.height - t, t],
            [t, - self.params.structure.height - t, -t],
            [t, - self.params.structure.height - t, t]
        ]
        for i in range(4):
            visual = visuals.addChild('Visual' + str(i))
            visual.addObject('RegularGridTopology', min=[0, 0, 0], max=max[i])
            visual.addObject('OglModel', color=[0.1, 0.1, 0.1, 1])
            visual.addObject('RigidMapping', index=i)

    def __addPulleys(self):
        self.pulleys = self.structure.addChild('Pulleys')

        dx = -self.params.structure.thickness
        shift = -self.params.pulley.shift
        self.positionsPulley = [[dx, dx, dx + shift],
                                [dx + shift, dx, dx],

                                [dx, dx, -dx - shift],
                                [dx + shift, dx, -dx],

                                [-dx, dx, dx + shift],
                                [-dx - shift, dx, dx],

                                [-dx, dx, -dx - shift],
                                [-dx - shift, dx, -dx]]

        a = [-0.3, -0.3, 0.3, 0.3, 0.3, 0.3, -0.3, -0.3]
        for i in range(8):
            Pulley(self.pulleys, self.structure,
                   self.positionsPulley[i], a[i], [0, 0, 1, 1, 2, 2, 3, 3][i], name="Pulley" + str(i))

    def __addPlatform(self):
        self.platform = self.modelling.addChild('Platform')
        self.simulation.addChild(self.platform)
        self.platform.addObject('MechanicalObject', template='Rigid3', position=self.position, showObject=False,
                                showObjectScale=0.1)
        self.platform.addObject('UniformMass', totalMass=self.params.platform.mass)

        self.corners = self.platform.addChild('Corners')
        dx = self.params.platform.side / 2.
        position = [[dx, dx, dx],
                    [dx, dx, -dx],
                    [-dx, dx, dx],
                    [-dx, dx, -dx],

                    [dx, -dx, dx],
                    [dx, -dx, -dx],
                    [-dx, -dx, dx],
                    [-dx, -dx, -dx]]
        self.corners.addObject('MechanicalObject', template='Rigid3', position=[pos + [0, 0, 0, 1] for pos in position],
                               showObject=False, showObjectScale=0.1,
                               showIndices=False, showIndicesScale=0.1)
        self.corners.addObject('RigidMapping', index=0)

        visual = self.platform.addChild('Visual')
        visual.addObject('MeshOBJLoader', name='loader', filename='mesh/cube.obj',
                         scale=0.5 * self.params.platform.side)
        visual.addObject('MeshTopology', src='@loader')
        visual.addObject('OglModel')
        visual.addObject('RigidMapping')

    def __addEffector(self):

        target = self.simulation.getRoot().addChild('EffectorTarget')
        target.addObject('EulerImplicitSolver', firstOrder=True)
        target.addObject('CGLinearSolver', iterations=10, tolerance=1e-5, threshold=1e-5)
        target.addObject('MechanicalObject', template='Rigid3', position=[0.1, -0.1, 0, 0.15, 0, 0, 1], showObject=True,
                         showObjectScale=1)
        target.addObject('UncoupledConstraintCorrection')
        spheres = target.addChild('Spheres')
        spheres.addObject('MechanicalObject', position=[[0.5, 0, 0], [0, 0, 0.5], [0, 0.5, 0]])
        spheres.addObject('SphereCollisionModel', radius=0.1)
        spheres.addObject('RigidMapping')

        self.platform.addObject('PositionEffector', template='Rigid3', indices=0,
                                effectorGoal=target.MechanicalObject.position.getLinkPath(),
                                useDirections=[1, 1, 1, 1, 0, 1])

    def __addDeformableCables(self):

        nbCables = 8
        positionStructure = self.structure.MechanicalObject.position.value
        positionBase = list(np.copy(self.corners.MechanicalObject.position.value))

        if self.cableModel == 'beam':  # TODO: remove once we have the sliding actuator
            self.structure.addData(name='speed', type='float', help='cable deployment speed', value=0)
            self.structure.addData(name='displacement', type='float', help='cable deployment displacement', value=0)

        pulleyId = [0, 2, 4, 6, 1, 3, 5, 7]
        structureId = [0, 1, 2, 3, 0, 1, 2, 3]
        self.cables = []
        for i in range(nbCables):
            positionPulley = vadd(positionStructure[structureId[i]], self.positionsPulley[pulleyId[i]])
            positionPulley[1] += -0.1
            direction = Vec3(vsub(positionBase[i], positionPulley))

            totalLength = self.params.cable.length
            length1 = direction.getNorm()
            length2 = totalLength - length1
            direction.normalize()

            v = Vec3(direction)
            q = Quat.createFromVectors(v, Vec3([1., 0., 0.]))

            nbSections = self.params.cable.nbSections
            dx = totalLength / nbSections

            nbSections1 = floor(length1 / totalLength * nbSections)
            nbSections2 = nbSections - nbSections1
            positions = [[positionPulley[0] - direction[0] * dx,
                          positionPulley[1] - length2 + dx * i,
                          positionPulley[2],
                          0, 0, 0.707, 0.707] for i in range(nbSections2)]

            positions += [[positionPulley[0] + direction[0] * dx * i,
                           positionPulley[1] + direction[1] * dx * i,
                           positionPulley[2] + direction[2] * dx * i]
                          + list(q) for i in range(nbSections1 + 1)]

            beam = Cable(self.modelling, self.simulation,
                         positions=positions, length=totalLength,
                         attachNode=self.corners, attachIndex=i,
                         cableModel=self.cableModel, name="Cable" + str(i)).beam
            self.cables.append(beam.rod)

            slidingpoints = self.pulleys.getChild('Pulley'+str(pulleyId[i])).Rigid.SlidingPoints

            difference = beam.rod.addChild('Difference')
            slidingpoints.addChild(difference)

            difference.addObject('MechanicalObject', template='Rigid3', position=[0, 0, 0, 0, 0, 0, 0] * 3)
            difference.addObject('RestShapeSpringsForceField', points=list(range(3)), stiffness=1e12)
            difference.addObject('BeamProjectionDifferenceMultiMapping', template='Rigid3,Rigid3,Rigid3',
                                 directions=[0, 1, 1, 0, 0, 0, 0],
                                 indicesInput1=list(range(3)),
                                 input1=slidingpoints.getMechanicalState().linkpath,
                                 input2=beam.rod.getMechanicalState().linkpath,
                                 interpolationInput2=beam.rod.BeamInterpolation.linkpath,
                                 output=difference.getMechanicalState().linkpath,
                                 draw=False, drawSize=0.1)

            if self.cableModel == 'beam':  # TODO: remove once we have the sliding actuator
                beam.node.speed.setParent(self.structure.speed.getLinkPath())
                beam.node.displacement.setParent(self.structure.displacement.getLinkPath())

    def addController(self):
        self.structure.addObject(CarocaController(self.structure))


def createScene(rootnode):
    from scripts.utils.header import addHeader, addSolvers

    settings, modelling, simulation = addHeader(rootnode)
    addSolvers(simulation, firstOrder=False, rayleighStiffness=0.1)
    rootnode.VisualStyle.displayFlags = "showInteractionForceFields showCollisionModels"

    caroca = Caroca(modelling, simulation, cableModel='beam')
    for i, cable in enumerate(caroca.cables):
        cable.addObject('RestShapeSpringsForceField', points=[0], stiffness=1e12)
        if i in range(4, 8):
            simulation.getChild('Cable'+str(i)).speed.value = -0.1
            simulation.getChild('Cable'+str(i)).displacement.value = -0.1

    rootnode.addObject('VisualGrid', size=10, nbSubdiv=100)
