import Sofa.Core
import numpy as np
from scripts.utils.baseobject import BaseObject

eps = 1e-3


class BeamController(Sofa.Core.Controller):
    """
    Control the beam deployment/retraction
    """

    # TODO: remove once we have the sliding actuator

    def __init__(self, *args, **kwargs):
        Sofa.Core.Controller.__init__(self, args, kwargs)
        self.name = "BeamController"
        self.object = args[0]  # object node
        self.index = args[1]  # current index to deploy
        self.length = args[2]  # segment length
        self.displacement = 0
        self.indexLimit = len(self.object.rod.BeamInterpolation.lengthList.value) - 1

    def onAnimateBeginEvent(self, event):

        node = self.object.node
        dt = node.getRoot().dt.value

        if node.velocity.value > 0 and self.displacement + node.velocity.value * dt > node.displacement.value:
            node.velocity.value = 0
        if node.velocity.value < 0 and self.displacement + node.velocity.value * dt < node.displacement.value:
            node.velocity.value = 0

        if self.index < 0 or self.index > self.indexLimit:  # the whole beam has been deployed or retracted
            node.velocity.value = 0  # stop the motion
            self.index = 0 if self.index < 0 else self.indexLimit
            return

        velocity = node.velocity.value
        lengthList = self.object.rod.BeamInterpolation.lengthList
        # Deploy or retract
        if velocity > 0 or velocity < 0:
            lengths = list(np.copy(lengthList.value))
            lengths[self.index] += node.velocity.value * dt
            self.displacement += node.velocity.value * dt

            # Limit deployment
            if node.velocity.value > 0 and lengths[self.index] > self.length:
                lengths[self.index] -= node.velocity.value * dt
                self.index -= 1

            # Limit retraction
            if node.velocity.value < 0 and lengths[self.index] < eps:
                lengths[self.index] -= node.velocity.value * dt
                self.index += 1

            lengthList.value = lengths


class BaseBeam(BaseObject):
    """
    Base rod with a retracted part, based on beam theory. With a visual and a collision model.
    """

    deformabletemplate = 'Rigid3'

    def __init__(self, modelling, simulation, params, positions, length, name='BaseBeam', collisionGroup=0):
        super().__init__(modelling, simulation, params, positions, length, name, collisionGroup)
        self.__addRod()
        self.addCylinderTopology()
        self.addVisualModel()

    def __addRod(self):
        self.node = self.modelling.addChild(self.name)
        self.simulation.addChild(self.node)
        self.node.addObject('RequiredPlugin', pluginName=['BeamAdapter'])

        nbSections = self.params.nbSections
        nbPoints = nbSections + 1
        dx = self.length / nbSections

        indexPairs = [[0, 0]]
        for i in range(nbSections):
            indexPairs += [[1, i]]

        self.base = self.node.addChild('RigidBase')
        self.base.addObject('MechanicalObject', template='Rigid3', position=self.positions[0])

        # The beam
        self.node.addData(name="indexExtremity", type='int', value=nbPoints - 1)
        self.deformable = self.node.addChild('Deformable')
        self.deformable.addObject('MechanicalObject', template='Rigid3', position=self.positions[1:nbPoints])

        self.rod = self.deformable.addChild('Rod')
        self.base.addChild(self.rod)
        self.rod.addObject('EdgeSetTopologyContainer', edges=[[i, i + 1] for i in range(nbSections)])
        self.rod.addObject('MechanicalObject', template='Rigid3', position=self.positions,
                           showIndices=False, showIndicesScale=0.005, showObject=False, showObjectScale=0.03)
        self.rod.addObject('BeamInterpolation',
                           defaultYoungModulus=self.params.youngModulus,
                           dofsAndBeamsAligned=True, straight=True,
                           radius=self.params.radius, crossSectionShape='circular',
                           defaultPoissonRatio=self.params.poissonRatio,
                           lengthList=[dx] * nbSections)
        self.rod.addObject('AdaptiveBeamForceFieldAndMass', computeMass=True,
                           massDensity=self.params.density)

        self.rod.addObject('SubsetMultiMapping', template="Rigid3,Rigid3",
                           input=[self.base.MechanicalObject.getLinkPath(),
                                  self.deformable.MechanicalObject.getLinkPath()],
                           output=self.rod.MechanicalObject.getLinkPath(),
                           indexPairs=indexPairs)

        # Define velocity of deployment/retraction and adds controller
        # TODO: remove once we have the sliding actuator
        self.node.addData(name='velocity', type='float', help='deployment velocity', value=0)
        self.node.addData(name='displacement', type='float', help='deployment displacement', value=0)
        self.node.addObject(BeamController(self, 0, dx))


# Test scene
def createScene(rootnode):
    from scripts.utils.header import addHeader, addSolvers
    import params

    settings, modelling, simulation = addHeader(rootnode)
    rootnode.VisualStyle.displayFlags = ['hideBehavior']
    addSolvers(simulation)

    nbSections = params.CableParameters.nbSections
    length = 5
    dx = length / nbSections
    positions = [[dx * i, 0, 0, 0, 0, 0, 1] for i in range(nbSections + 1)]
    beam = BaseBeam(modelling, simulation, params.CableParameters, positions, length)
    beam.node.RigidBase.addObject('FixedConstraint', indices=0)
    beam.node.velocity.value = -0.1
    beam.node.displacement.value = -2
